D150

#Mach
0.3

#IYsym   IZsym   Zsym
0	0	0

#Sref    Cref    Bref
122.400	4.193	29.192

#Xref    Yref    Zref
0.000	0.000	0.000

#--------------------------------------------------
BODY
Fuselage

!Nbody  Bspace
100	1.0

SCALE
1.0	1.0	1.0

TRANSLATE
0.0	0.0	-0.723764

BFILE
/users/disk12/cfse2/Leon/CEASIOMpy_Leon/CEASIOMpy/WKDIR/Results/PyAVL/Fuselage1.dat

BFILE
/users/disk12/cfse2/Leon/CEASIOMpy_Leon/CEASIOMpy/WKDIR/Results/PyAVL/Fuselage1.dat

BFILE
/users/disk12/cfse2/Leon/CEASIOMpy_Leon/CEASIOMpy/WKDIR/Results/PyAVL/Fuselage1.dat

BFILE
/users/disk12/cfse2/Leon/CEASIOMpy_Leon/CEASIOMpy/WKDIR/Results/PyAVL/Fuselage1.dat

BFILE
/users/disk12/cfse2/Leon/CEASIOMpy_Leon/CEASIOMpy/WKDIR/Results/PyAVL/Fuselage1.dat

BFILE
/users/disk12/cfse2/Leon/CEASIOMpy_Leon/CEASIOMpy/WKDIR/Results/PyAVL/Fuselage1.dat

BFILE
/users/disk12/cfse2/Leon/CEASIOMpy_Leon/CEASIOMpy/WKDIR/Results/PyAVL/Fuselage1.dat

BFILE
/users/disk12/cfse2/Leon/CEASIOMpy_Leon/CEASIOMpy/WKDIR/Results/PyAVL/Fuselage1.dat

BFILE
/users/disk12/cfse2/Leon/CEASIOMpy_Leon/CEASIOMpy/WKDIR/Results/PyAVL/Fuselage1.dat

BFILE
/users/disk12/cfse2/Leon/CEASIOMpy_Leon/CEASIOMpy/WKDIR/Results/PyAVL/Fuselage1.dat

BFILE
/users/disk12/cfse2/Leon/CEASIOMpy_Leon/CEASIOMpy/WKDIR/Results/PyAVL/Fuselage1.dat

BFILE
/users/disk12/cfse2/Leon/CEASIOMpy_Leon/CEASIOMpy/WKDIR/Results/PyAVL/Fuselage1.dat

BFILE
/users/disk12/cfse2/Leon/CEASIOMpy_Leon/CEASIOMpy/WKDIR/Results/PyAVL/Fuselage1.dat

BFILE
/users/disk12/cfse2/Leon/CEASIOMpy_Leon/CEASIOMpy/WKDIR/Results/PyAVL/Fuselage1.dat

BFILE
/users/disk12/cfse2/Leon/CEASIOMpy_Leon/CEASIOMpy/WKDIR/Results/PyAVL/Fuselage1.dat

BFILE
/users/disk12/cfse2/Leon/CEASIOMpy_Leon/CEASIOMpy/WKDIR/Results/PyAVL/Fuselage1.dat

BFILE
/users/disk12/cfse2/Leon/CEASIOMpy_Leon/CEASIOMpy/WKDIR/Results/PyAVL/Fuselage1.dat

BFILE
/users/disk12/cfse2/Leon/CEASIOMpy_Leon/CEASIOMpy/WKDIR/Results/PyAVL/Fuselage1.dat

BFILE
/users/disk12/cfse2/Leon/CEASIOMpy_Leon/CEASIOMpy/WKDIR/Results/PyAVL/Fuselage1.dat

BFILE
/users/disk12/cfse2/Leon/CEASIOMpy_Leon/CEASIOMpy/WKDIR/Results/PyAVL/Fuselage1.dat

BFILE
/users/disk12/cfse2/Leon/CEASIOMpy_Leon/CEASIOMpy/WKDIR/Results/PyAVL/Fuselage1.dat

BFILE
/users/disk12/cfse2/Leon/CEASIOMpy_Leon/CEASIOMpy/WKDIR/Results/PyAVL/Fuselage1.dat

BFILE
/users/disk12/cfse2/Leon/CEASIOMpy_Leon/CEASIOMpy/WKDIR/Results/PyAVL/Fuselage1.dat

BFILE
/users/disk12/cfse2/Leon/CEASIOMpy_Leon/CEASIOMpy/WKDIR/Results/PyAVL/Fuselage1.dat

BFILE
/users/disk12/cfse2/Leon/CEASIOMpy_Leon/CEASIOMpy/WKDIR/Results/PyAVL/Fuselage1.dat

BFILE
/users/disk12/cfse2/Leon/CEASIOMpy_Leon/CEASIOMpy/WKDIR/Results/PyAVL/Fuselage1.dat

BFILE
/users/disk12/cfse2/Leon/CEASIOMpy_Leon/CEASIOMpy/WKDIR/Results/PyAVL/Fuselage1.dat

BFILE
/users/disk12/cfse2/Leon/CEASIOMpy_Leon/CEASIOMpy/WKDIR/Results/PyAVL/Fuselage1.dat

BFILE
/users/disk12/cfse2/Leon/CEASIOMpy_Leon/CEASIOMpy/WKDIR/Results/PyAVL/Fuselage1.dat

BFILE
/users/disk12/cfse2/Leon/CEASIOMpy_Leon/CEASIOMpy/WKDIR/Results/PyAVL/Fuselage1.dat

BFILE
/users/disk12/cfse2/Leon/CEASIOMpy_Leon/CEASIOMpy/WKDIR/Results/PyAVL/Fuselage1.dat

BFILE
/users/disk12/cfse2/Leon/CEASIOMpy_Leon/CEASIOMpy/WKDIR/Results/PyAVL/Fuselage1.dat

BFILE
/users/disk12/cfse2/Leon/CEASIOMpy_Leon/CEASIOMpy/WKDIR/Results/PyAVL/Fuselage1.dat

BFILE
/users/disk12/cfse2/Leon/CEASIOMpy_Leon/CEASIOMpy/WKDIR/Results/PyAVL/Fuselage1.dat

BFILE
/users/disk12/cfse2/Leon/CEASIOMpy_Leon/CEASIOMpy/WKDIR/Results/PyAVL/Fuselage1.dat

BFILE
/users/disk12/cfse2/Leon/CEASIOMpy_Leon/CEASIOMpy/WKDIR/Results/PyAVL/Fuselage1.dat

BFILE
/users/disk12/cfse2/Leon/CEASIOMpy_Leon/CEASIOMpy/WKDIR/Results/PyAVL/Fuselage1.dat

BFILE
/users/disk12/cfse2/Leon/CEASIOMpy_Leon/CEASIOMpy/WKDIR/Results/PyAVL/Fuselage1.dat

BFILE
/users/disk12/cfse2/Leon/CEASIOMpy_Leon/CEASIOMpy/WKDIR/Results/PyAVL/Fuselage1.dat

BFILE
/users/disk12/cfse2/Leon/CEASIOMpy_Leon/CEASIOMpy/WKDIR/Results/PyAVL/Fuselage1.dat

BFILE
/users/disk12/cfse2/Leon/CEASIOMpy_Leon/CEASIOMpy/WKDIR/Results/PyAVL/Fuselage1.dat

BFILE
/users/disk12/cfse2/Leon/CEASIOMpy_Leon/CEASIOMpy/WKDIR/Results/PyAVL/Fuselage1.dat

BFILE
/users/disk12/cfse2/Leon/CEASIOMpy_Leon/CEASIOMpy/WKDIR/Results/PyAVL/Fuselage1.dat

BFILE
/users/disk12/cfse2/Leon/CEASIOMpy_Leon/CEASIOMpy/WKDIR/Results/PyAVL/Fuselage1.dat

BFILE
/users/disk12/cfse2/Leon/CEASIOMpy_Leon/CEASIOMpy/WKDIR/Results/PyAVL/Fuselage1.dat

BFILE
/users/disk12/cfse2/Leon/CEASIOMpy_Leon/CEASIOMpy/WKDIR/Results/PyAVL/Fuselage1.dat

BFILE
/users/disk12/cfse2/Leon/CEASIOMpy_Leon/CEASIOMpy/WKDIR/Results/PyAVL/Fuselage1.dat

BFILE
/users/disk12/cfse2/Leon/CEASIOMpy_Leon/CEASIOMpy/WKDIR/Results/PyAVL/Fuselage1.dat

BFILE
/users/disk12/cfse2/Leon/CEASIOMpy_Leon/CEASIOMpy/WKDIR/Results/PyAVL/Fuselage1.dat

BFILE
/users/disk12/cfse2/Leon/CEASIOMpy_Leon/CEASIOMpy/WKDIR/Results/PyAVL/Fuselage1.dat

BFILE
/users/disk12/cfse2/Leon/CEASIOMpy_Leon/CEASIOMpy/WKDIR/Results/PyAVL/Fuselage1.dat

BFILE
/users/disk12/cfse2/Leon/CEASIOMpy_Leon/CEASIOMpy/WKDIR/Results/PyAVL/Fuselage1.dat

BFILE
/users/disk12/cfse2/Leon/CEASIOMpy_Leon/CEASIOMpy/WKDIR/Results/PyAVL/Fuselage1.dat

BFILE
/users/disk12/cfse2/Leon/CEASIOMpy_Leon/CEASIOMpy/WKDIR/Results/PyAVL/Fuselage1.dat

BFILE
/users/disk12/cfse2/Leon/CEASIOMpy_Leon/CEASIOMpy/WKDIR/Results/PyAVL/Fuselage1.dat

BFILE
/users/disk12/cfse2/Leon/CEASIOMpy_Leon/CEASIOMpy/WKDIR/Results/PyAVL/Fuselage1.dat

BFILE
/users/disk12/cfse2/Leon/CEASIOMpy_Leon/CEASIOMpy/WKDIR/Results/PyAVL/Fuselage1.dat

BFILE
/users/disk12/cfse2/Leon/CEASIOMpy_Leon/CEASIOMpy/WKDIR/Results/PyAVL/Fuselage1.dat

BFILE
/users/disk12/cfse2/Leon/CEASIOMpy_Leon/CEASIOMpy/WKDIR/Results/PyAVL/Fuselage1.dat

BFILE
/users/disk12/cfse2/Leon/CEASIOMpy_Leon/CEASIOMpy/WKDIR/Results/PyAVL/Fuselage1.dat

#--------------------------------------------------
SURFACE
Wing

!Nchordwise  Cspace  Nspanwise  Sspace
20.0  1.0   50.0 1.0

COMPONENT
1

YDUPLICATE
0

ANGLE
0

SCALE
1.0	1.0	1.0

TRANSLATE
12.746	0.0	-1.136

#---------------
SECTION
#Xle    Yle    Zle     Chord   Ainc
0.000 1.734 0.000 6.076 2.0000000000000027
CONTROL
flap 0.0 0.812922 -0.56760591384 3.6520272602094455 0.0 1.0

AFILE
/users/disk12/cfse2/Leon/CEASIOMpy_Leon/CEASIOMpy/WKDIR/Results/PyAVL/D150_VAMP_W_SupCritProf1.dat

#---------------
SECTION
#Xle    Yle    Zle     Chord   Ainc
0.000 1.856 0.000 6.076 2.0000000000000027
CONTROL
flap 0.0 0.7195 -0.56760591384 3.6520272602094455 0.0 1.0

CONTROL
flap 0.0 0.7195 -0.08731417212000013 7.34590282097975 0.0 1.0

AFILE
/users/disk12/cfse2/Leon/CEASIOMpy_Leon/CEASIOMpy/WKDIR/Results/PyAVL/D150_VAMP_W_SupCritProf1.dat

#---------------
SECTION
#Xle    Yle    Zle     Chord   Ainc
2.307 6.333 0.472 3.758 2.0000000000000027
CONTROL
flap 0.0 0.705129 -0.08731417212000013 7.34590282097975 0.0 1.0

CONTROL
aileron 0.0 0.702209 0.05948737451999996 3.1573762780532824 0.0 -1.0

AFILE
/users/disk12/cfse2/Leon/CEASIOMpy_Leon/CEASIOMpy/WKDIR/Results/PyAVL/D150_VAMP_W_SupCritProf1.dat

#---------------
SECTION
#Xle    Yle    Zle     Chord   Ainc
7.782 16.956 1.594 1.496 2.0000000000000027
CONTROL
aileron 0.0 0.712 0.05948737451999996 3.1573762780532824 0.0 -1.0

AFILE
/users/disk12/cfse2/Leon/CEASIOMpy_Leon/CEASIOMpy/WKDIR/Results/PyAVL/D150_VAMP_W_SupCritProf1.dat

#--------------------------------------------------
SURFACE
Wing

!Nchordwise  Cspace  Nspanwise  Sspace
20.0  1.0   50.0 1.0

COMPONENT
1

YDUPLICATE
0

ANGLE
0

SCALE
1.0	1.0	1.0

TRANSLATE
31.466	0.0	0.697

#---------------
SECTION
#Xle    Yle    Zle     Chord   Ainc
0.000 1.135 0.000 3.744 0.0
CONTROL
elevator 0.0 0.577506 0.2339981590200002 4.860097836819803 0.0 1.0

AFILE
/users/disk12/cfse2/Leon/CEASIOMpy_Leon/CEASIOMpy/WKDIR/Results/PyAVL/D150_VAMP_HL_NACA0000Prof1.dat

#---------------
SECTION
#Xle    Yle    Zle     Chord   Ainc
3.937 6.225 0.545 1.236 0.0
CONTROL
elevator 0.0 0.64 0.2339981590200002 4.860097836819803 0.0 1.0

AFILE
/users/disk12/cfse2/Leon/CEASIOMpy_Leon/CEASIOMpy/WKDIR/Results/PyAVL/D150_VAMP_HL_NACA0000Prof1.dat

#--------------------------------------------------
SURFACE
Wing

!Nchordwise  Cspace  Nspanwise  Sspace
20.0  1.0   50.0 1.0

COMPONENT
1

ANGLE
0

SCALE
1.0	1.0	1.0

TRANSLATE
29.838	-0.002	1.8

#---------------
SECTION
#Xle    Yle    Zle     Chord   Ainc
0.000 0.000 0.000 5.435 0.0
CONTROL
rudder 0.0 0.6875 0.14402007999999983 0.0 0.180109403831032 -1.0

AFILE
/users/disk12/cfse2/Leon/CEASIOMpy_Leon/CEASIOMpy/WKDIR/Results/PyAVL/D150_VAMP_SL_NACA0000Prof1.dat

#---------------
SECTION
#Xle    Yle    Zle     Chord   Ainc
4.988 0.192 5.865 1.897 0.0
CONTROL
rudder 0.0 0.714 0.14402007999999983 0.0 0.180109403831032 -1.0

AFILE
/users/disk12/cfse2/Leon/CEASIOMpy_Leon/CEASIOMpy/WKDIR/Results/PyAVL/D150_VAMP_SL_NACA0000Prof1.dat
