OpenVSP model (file version 5), 7 components.
Geometry view with OpenVSP parameter names; values to 6 digits, angles in degrees, lengths in the model's unit.
Overall bounding box: X_Min=0 X_Len=17.06 Y_Min=-5.04688 Y_Len=10.0938 Z_Min=-0.5 Z_Len=4.48672

Fuselage "Mainbody"
  location (X Y Z) 0 0 0, rotation 0 0 0
  bounding box size 17.06 1.95 1.56225
  Design: Length=17.06
  cross sections:
    n  XLocPercent  YLocPercent  ZLocPercent  shape
    0  0            0            0.03         point
    1  0.303414     0            0.04         ellipse Ellipse_Height=1.38201 Ellipse_Width=1.21036
    2  0.401707     0            0.04         ellipse Ellipse_Height=1.38201 Ellipse_Width=1.37582
    3  0.616505     0            0.0326087    ellipse Ellipse_Height=1.18182 Ellipse_Width=1.95
    4  0.929273     0            0.0326087    ellipse Ellipse_Height=1.25 Ellipse_Width=1.25
    5  1            0            0.03237      point

Wing "Main wing", child of "Mainbody"
  location (X Y Z) 6.30435 0 0.29, rotation 0 0 0
  symmetric about XZ
  bounding box size 5.61458 10.0938 0.128695
  totals: TotalSpan=10.0938 TotalProjectedSpan=10.0938 TotalChord=3.40885 TotalArea=34.4081 TotalAR=2.96104 MAC=3.8846
  root: chord 5.61458, twist 0, edit curve Width=5.61458 Height=0.121124 AbsoluteFlag=0 SymType=0 cubic Bezier points (X Y): 0.5 0, 0.416667 -0.0833333, 0.333333 -0.166667, 0.25 -0.25, 0.208333 -0.291667, 0.166667 -0.333333, 0.125 -0.375, 0.0833333 -0.416667, 0.0416667 -0.541667, 0 -0.5, -0.166667 -0.333333, -0.333333 -0.166667, -0.5 0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
  sections:
    n  Span     Root_Chord  Tip_Chord  Area     Sweep    Sweep_Location  Dihedral  Twist  Twist_Location  tip airfoil
    1  5.04688  5.61458     1.20312    17.2041  41.0455  0               0         0      0.25            NACA 4-series Camber=0 CamberLoc=0.2 ThickChord=0.1

Wing "Hardpoints", child of "Main wing"
  location (X Y Z) 8.15217 1.41313 -0.02, rotation 90 0 0
  symmetric about XZ
  bounding box size 1.1714 2.93459 0.296876
  totals: TotalSpan=0.593752 TotalProjectedSpan=0.593752 TotalChord=1.01042 TotalArea=0.599937 TotalAR=0.587631 MAC=1.01045
  root: chord 1.02083, twist 0, edit curve Width=1.02083 Height=0.1 AbsoluteFlag=0 SymType=0 cubic Bezier points (X Y): 0.5 0, 0.416667 -0.0833333, 0.333333 -0.166667, 0.25 -0.25, 0.208333 -0.291667, 0.166667 -0.333333, 0.125 -0.375, 0.0833333 -0.416667, 0.0416667 -0.541667, 0 -0.5, -0.166667 -0.333333, -0.333333 -0.166667, -0.5 0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
  sections:
    n  Span      Root_Chord  Tip_Chord  Area      Sweep  Sweep_Location  Dihedral  Twist  Twist_Location  tip airfoil
    1  0.296876  1.02083     1          0.299968  30     0               0         0      0.25            NACA 4-series Camber=0 CamberLoc=0.2 ThickChord=0.1

Fuselage "External Tank", child of "Main wing"
  location (X Y Z) 6.52174 1.41304 -0.15, rotation 0 0 0
  symmetric about XZ
  bounding box size 4.12679 3.52609 0.7
  Design: Length=4.12679
  cross sections:
    n  XLocPercent  YLocPercent  ZLocPercent  shape
    0  0            0            0            point
    1  0.25         0            0            ellipse Ellipse_Height=0.7 Ellipse_Width=0.7
    2  0.5          0            0            as above
    3  0.75         0            0            as above
    4  1            0            0            point

Wing "Tail Elevon", child of "Main wing"
  location (X Y Z) 12.3913 0.5 0.29, rotation 0 0 0
  symmetric about XZ
  bounding box size 3.56657 6.06755 0.129757
  totals: TotalSpan=5.06755 TotalProjectedSpan=5.06755 TotalChord=2.43169 TotalArea=12.3227 TotalAR=2.08396 MAC=2.60824
  root: chord 3.56657, twist 0, edit curve Width=3.56657 Height=0.1 AbsoluteFlag=0 SymType=0 cubic Bezier points (X Y): 0.5 0, 0.446546 -0.0833333, 0.393092 -0.166667, 0.339638 -0.25, 0.312912 -0.291667, 0.286185 -0.333333, 0.259458 -0.375, 0.232731 -0.416667, 0.235883 -0.541667, 0.179277 -0.5, -0.0471487 -0.333333, -0.273574 -0.166667, -0.5 0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
  sections:
    n  Span     Root_Chord  Tip_Chord  Area     Sweep    Sweep_Location  Dihedral  Twist  Twist_Location  tip airfoil
    1  2.53377  3.56657     1.29682    6.16136  41.4875  0               0         0      0.25            NACA 4-series Camber=0 CamberLoc=0.2 ThickChord=0.1
  SS_Control "SS_CONT_0": UStart=0.371951 UEnd=0.689024 Length_C_Start=1 Length_C_End=1 Length_Start=3.30361 Length_End=1.29682 LE_Flag=1 Surf_Type=2

Wing "Vetical Stablizer", child of "Main wing"
  location (X Y Z) 9.78261 0 0.85, rotation 90 0 0
  bounding box size 7.20987 0.120382 3.13672
  totals: TotalSpan=3.13672 TotalProjectedSpan=3.13672 TotalChord=3.19968 TotalArea=8.46748 TotalAR=1.16198 MAC=3.24178
  root: chord 5.83333, twist 0, edit curve Width=5.83333 Height=0.1 AbsoluteFlag=0 SymType=0 cubic Bezier points (X Y): 0.5 0, 0.416667 -0.0833333, 0.333333 -0.166667, 0.25 -0.25, 0.208333 -0.291667, 0.166667 -0.333333, 0.125 -0.375, 0.0833333 -0.416667, 0.0416667 -0.541667, 0 -0.5, -0.166667 -0.333333, -0.333333 -0.166667, -0.5 0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
  sections:
    n  Span      Root_Chord  Tip_Chord  Area     Sweep    Sweep_Location  Dihedral  Twist  Twist_Location  tip airfoil
    1  0.890626  5.83333     2.88113    3.88066  75.1602  0               0         0      0.25            edit curve Width=2.88113 Height=0.104768 AbsoluteFlag=0 SymType=0 cubic Bezier points (X Y): 0.5 0, 0.416667 -0.0833333, 0.333333 -0.166667, 0.25 -0.25, 0.208333 -0.291667, 0.166667 -0.333333, 0.125 -0.375, 0.0833333 -0.416667, 0.0416667 -0.541667, 0 -0.5, -0.166667 -0.333333, -0.333333 -0.166667, -0.5 0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
    2  2.24609   2.88113     1.20313    4.58681  49.6659  0               0         0      0.25            NACA 4-series Camber=0 CamberLoc=0.2 ThickChord=0.1
  SS_Control "SS_CONT_0": UStart=0.304878 UEnd=0.743902 Length_C_Start=0.237805 Length_C_End=0.237805 Length_Start=1.23309 Length_End=0.295842 LE_Flag=0 Surf_Type=2

Wing "Back-front wing connector", child of "Main wing"
  location (X Y Z) 11.9 -1.19565 0.29, rotation 0 0 0
  symmetric about XZ
  bounding box size 1.11707 2.3913 0.108333
  totals: TotalSpan=2.50334 TotalProjectedSpan=2.50334 TotalChord=0.558533 TotalArea=1.3982 TotalAR=4.48199 MAC=0.744711
  root: chord 1.11707, twist 0, edit curve Width=1.11707 Height=0.1 AbsoluteFlag=0 SymType=0 cubic Bezier points (X Y): 0.5 0, 0.416667 -0.0833333, 0.333333 -0.166667, 0.25 -0.25, 0.208333 -0.291667, 0.166667 -0.333333, 0.125 -0.375, 0.0833333 -0.416667, 0.0416667 -0.541667, 0 -0.5, -0.166667 -0.333333, -0.333333 -0.166667, -0.5 0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
  sections:
    n  Span     Root_Chord  Tip_Chord  Area      Sweep     Sweep_Location  Dihedral  Twist  Twist_Location  tip airfoil
    1  1.25167  1.11707     0          0.699099  0.278977  0               0         0      0.25            NACA 4-series Camber=0 CamberLoc=0.2 ThickChord=0.1
