OpenVSP model (file version 5), 4 components.
Geometry view with OpenVSP parameter names; values to 6 digits, angles in degrees, lengths in the model's unit.
Overall bounding box: X_Min=0 X_Len=31.1858 Y_Min=-11.1939 Y_Len=22.3877 Z_Min=-1.64466 Z_Len=8.05941

Fuselage "Fuselage"
  location (X Y Z) 0 0 0, rotation 0 0 0
  bounding box size 30 3.97439 3.47499
  Design: Length=30
  cross sections:
    n   XLocPercent  YLocPercent  ZLocPercent  shape
    0   0            0            -0.045       point
    1   0.0798663    0            -0.023       rounded rectangle RoundRectXSec_Radius=0.2 RoundedRect_Height=1.5 RoundedRect_Width=1.5
    2   0.198587     0            0            rounded rectangle RoundRectXSec_Radius=0.2 RoundedRect_Height=2.5 RoundedRect_Width=2.5
    3   0.298381     0            0            rounded rectangle RoundRectXSec_Radius=0.2 RoundedRect_Height=2.5 RoundedRect_Width=3.5
    4   0.56404      0            -0.005       as above
    5   0.668292     0            -0.005       rounded rectangle RoundRectXSec_Radius=0.2 RoundedRect_Height=2 RoundedRect_Width=2.5
    6   0.751219     0            -0.005       rounded rectangle RoundRectXSec_Radius=0.2 RoundedRect_Height=2 RoundedRect_Width=1.73469
    7   0.834146     0            -0.005       rounded rectangle RoundRectXSec_Radius=0.2 RoundedRect_Height=2 RoundedRect_Width=1.22449
    8   0.875609     0            -0.005       rounded rectangle RoundRectXSec_Radius=0.2 RoundedRect_Height=1.76327 RoundedRect_Width=1.22449
    9   0.917073     0            -0.005       rounded rectangle RoundRectXSec_Radius=0.2 RoundedRect_Height=1.81224 RoundedRect_Width=0.916285
    10  1            0            0.02         point

Wing "Main_Wing", child of "Fuselage"
  location (X Y Z) 12 1.19387 0.322523, rotation 0 0 0
  symmetric about XZ
  bounding box size 6.98484 22.3877 0.506843
  totals: TotalSpan=20 TotalProjectedSpan=20 TotalChord=3.02835 TotalArea=60.567 TotalAR=6.60426 MAC=3.39175
  root: chord 4.84536, twist 0, NACA 4-series Camber=0 CamberLoc=0.2 ThickChord=0.104545
  sections:
    n  Span  Root_Chord  Tip_Chord  Area     Sweep  Sweep_Location  Dihedral  Twist  Twist_Location  tip airfoil
    1  5     4.84536     3.02835    19.6843  30     0               0         0      0.25            NACA 4-series Camber=0 CamberLoc=0.2 ThickChord=0.1
    2  5     3.02835     1.21134    10.5992  30     0               0         0      0.25            as above

Wing "Vertical_Stabilizer", child of "Main_Wing"
  location (X Y Z) 22.0652 0 0.5, rotation 90 0 0
  bounding box size 8.74083 0.50029 5.91475
  totals: TotalSpan=5.91475 TotalProjectedSpan=5.91475 TotalChord=4.5625 TotalArea=23.858 TotalAR=1.46635 MAC=4.70142
  root: chord 7, twist 0, NACA 4-series Camber=0 CamberLoc=0.2 ThickChord=0.05
  sections:
    n  Span     Root_Chord  Tip_Chord  Area     Sweep  Sweep_Location  Dihedral  Twist  Twist_Location  tip airfoil
    1  1.86936  7           5          11.2162  55     0               0         0      0.25            NACA 4-series Camber=0 CamberLoc=0.2 ThickChord=0.1
    2  4.04539  5           1.25       12.6418  50     0               0         0      0.25            as above

Wing "Horizontal_Stabilizer", child of "Vertical_Stabilizer"
  location (X Y Z) 28.7391 0 4.74783, rotation 0 0 0
  symmetric about XZ
  bounding box size 2.44665 9.23995 0.150087
  totals: TotalSpan=9.23995 TotalProjectedSpan=9.23995 TotalChord=1.375 TotalArea=13.253 TotalAR=6.44208 MAC=1.44657
  root: chord 1.5, twist 0, NACA 4-series Camber=0 CamberLoc=0.2 ThickChord=0.1
  sections:
    n  Span     Root_Chord  Tip_Chord  Area     Sweep  Sweep_Location  Dihedral  Twist  Twist_Location  tip airfoil
    1  3.40609  1.5         1.5        5.10914  0      0               0         0      0.25            as above
    2  1.21389  1.5         1          1.51736  50     0               0         0      0.25            as above
