OpenVSP model (file version 5), 6 components.
Geometry view with OpenVSP parameter names; values to 6 digits, angles in degrees, lengths in the model's unit.
Overall bounding box: X_Min=1 X_Len=59.68 Y_Min=-12.8004 Y_Len=25.6008 Z_Min=-1.48316 Z_Len=9.93086

Fuselage "Fuselage"
  location (X Y Z) 1 0 -0.070208, rotation 0 0 0
  bounding box size 59.68 3.90015 4.28155
  Design: Length=59.68
  cross sections:
    n  XLocPercent  YLocPercent  ZLocPercent  shape
    0  0            0            0.00234027   circle Circle_Diameter=0.13612
    1  0.07125      0            0.009        circle Circle_Diameter=1.86784
    2  0.1425       0            0.0165       circle Circle_Diameter=2.97176
    3  0.2125       0            0.02         circle Circle_Diameter=3.35
    4  0.35         0            0.02         as above
    5  0.426        0            0.02         as above
    6  0.781        0            0.02265      circle Circle_Diameter=2.7
    7  0.87         0            0.0285       circle Circle_Diameter=1.9
    8  1            0            0.0401       circle Circle_Diameter=0.23

Wing "Wing", child of "Fuselage"
  location (X Y Z) 13 0 0.5, rotation 0 0 0
  symmetric about XZ
  bounding box size 35.6051 25.6008 1.7396
  totals: TotalSpan=25.7232 TotalProjectedSpan=25.6008 TotalChord=15.2745 TotalArea=386.573 TotalAR=1.69541 MAC=20.6812
  root: chord 35.588, twist 0, airfoil file "airfoils/foil_1_11"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 BaseThickChord=0.0300527 ThickChord=0.0300527
  sections:
    n   Span       Root_Chord  Tip_Chord  Area      Sweep  Sweep_Location  Dihedral  Twist      Twist_Location  tip airfoil
    1   1.28723    35.588      30.6015    42.6006   75.2   0               -2.3      -0.2       0.25            airfoil file "airfoils/foil_1_10"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 BaseThickChord=0.0293658 ThickChord=0.0293658
    2   0.321808   30.6015     29.3261    9.6426    75.53  0               -16.5     -0.37      0               airfoil file "airfoils/foil_1_9"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 BaseThickChord=0.0287075 ThickChord=0.0287075
    3   0.160904   29.3261     28.6884    4.66739   75.53  0               -2.8      -0.4       0               as above
    4   0.080452   28.6884     25.5425    2.18149   75.53  0               39        -0.365228  0               airfoil file "airfoils/foil_1_9"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 BaseThickChord=0.0287075 ThickChord=0.0315
    5   0.080452   25.5425     25.2457    2.04301   75.53  0               -3.3597   -0.37329   0               as above
    6   0.321808   25.2457     24.0655    7.93436   75.53  0               -3.3597   -0.459453  0               as above
    7   0.321808   24.0655     22.9055    7.55782   75.53  0               -3.3597   -0.55268   0               as above
    8   1.28723    22.9055     18.7084    26.7834   74     0               -3.54     -1.003     0               airfoil file "airfoils/foil_1_8"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 BaseThickChord=0.0281009 ThickChord=0.0315
    9   0.643616   18.7084     17.2111    11.5592   68.5   0               -4.2      -1.29839   0               airfoil file "airfoils/foil_1_7"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 BaseThickChord=0.0275568 ThickChord=0.0315
    10  0.321808   17.2111     16.4712    5.41962   68.5   0               -4.2      -1.47355   0               as above
    11  0.160904   16.4712     16.137     2.6234    68.5   0               -4.2      -1.5696    0               as above
    12  0.080452   16.137      16.0152    1.29336   68.5   0               -4.2      -1.62615   0               as above
    13  0.080452   16.0152     17.515     1.34879   68.5   0               -7        -1.66      0               airfoil file "airfoils/foil_1_7"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 BaseThickChord=0.0275568 ThickChord=0.023
    14  0.648644   17.515      16.1185    10.9081   64     0               -3.34     -1.99579   0               airfoil file "airfoils/foil_1_6"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 BaseThickChord=0.0270361 ThickChord=0.0245
    15  0.648644   16.1185     14.722     10.0023   64     0               -3.34     -2.38      0               airfoil file "airfoils/foil_1_6"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 BaseThickChord=0.0270361 ThickChord=0.0227
    16  0.0814501  14.722      12.264     1.09901   60.7   0               -4        -2.54699   0               airfoil file "airfoils/foil_1_5"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 BaseThickChord=0.0264878 ThickChord=0.036
    17  0.0814501  12.264      12.109     0.992591  60.7   0               -4        -2.54699   0               as above
    18  0.161851   12.109      11.8445    1.93844   60.7   0               -4        -2.62232   0               as above
    19  0.324322   11.8445     11.2996    3.75307   60.7   0               -4        -2.77299   0               airfoil file "airfoils/foil_1_5"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 BaseThickChord=0.0264878 ThickChord=0.035
    20  0.648644   11.2996     10.2101    6.97608   60.7   0               -4        -3.225     0               airfoil file "airfoils/foil_1_5"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 BaseThickChord=0.0264878 ThickChord=0.038
    21  1.29729    10.2101     8.29255    12.0016   57.2   0               -4.4      -3.925     0               airfoil file "airfoils/foil_1_4"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 BaseThickChord=0.0258566 ThickChord=0.04
    22  0.0502643  8.29255     7.70233    0.401985  57.2   0               -5.3      -4.49641   0               airfoil file "airfoils/foil_1_3"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 BaseThickChord=0.0250906 ThickChord=0.0355
    23  0.0810805  7.70233     7.57951    0.61953   57.2   0               -5.3      -4.72241   0               airfoil file "airfoils/foil_1_3"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 BaseThickChord=0.0250906 ThickChord=0.036
    24  0.162161   7.57951     7.37073    1.21217   52.8   0               0         -4.72241   0               airfoil file "airfoils/foil_1_3"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 BaseThickChord=0.0250906 ThickChord=0.035
    25  0.162161   7.37073     7.16204    1.17832   52.8   0               -5.3      -4.72241   0               as above
    26  0.162161   7.16204     6.95494    1.14461   52.8   0               -5.3      -4.72241   0               as above
    27  0.324322   6.95494     6.55267    2.19041   52.8   0               -4.8      -4.96348   0               as above
    28  0.324322   6.55267     6.15435    2.06058   52.8   0               -4.9      -5.34015   0               as above
    29  1.26712    6.15435     4.62526    6.82953   52.25  0               -4.9      -6.15585   0               airfoil file "airfoils/foil_1_2"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 BaseThickChord=0.0241614 ThickChord=0.035
    30  1.28676    4.62526     2.094      4.32306   63.4   0               -4        -7.55056   0               airfoil file "airfoils/foil_1_11"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 BaseThickChord=0.0300527 ThickChord=0.035

Wing "Elevon_Inn", child of "Wing"
  location (X Y Z) 45.7102 1.85 0.536843, rotation 1.96721 -0.860345 0.0370041
  symmetric about XZ
  bounding box size 2.69036 9.94204 0.235444
  totals: TotalSpan=6.24386 TotalProjectedSpan=6.24386 TotalChord=2.12931 TotalArea=13.8618 TotalAR=2.81245 MAC=2.25224
  root: chord 2.68604, twist 0, airfoil file "airfoils/foil_1_11"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 BaseThickChord=0.0300527 ThickChord=0.0300527
  sections:
    n  Span      Root_Chord  Tip_Chord  Area      Sweep    Sweep_Location  Dihedral  Twist       Twist_Location  tip airfoil
    1  0.320918  2.68604     2.5922     0.846939  11.1125  0               0         -0.0681015  0               airfoil file "airfoils/foil_1_9"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 BaseThickChord=0.0287075 ThickChord=0.0287075
    2  0.320918  2.5922      2.48862    0.815262  12.3203  0               0         -0.114742   0               as above
    3  1.28367   2.48862     2.10958    2.95129   11.354   0               0         -0.132967   0               airfoil file "airfoils/foil_1_8"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 BaseThickChord=0.0281009 ThickChord=0.0281009
    4  0.641835  2.10958     1.9323     1.29711   9.90459  0               0         -0.214976   0               airfoil file "airfoils/foil_1_7"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 BaseThickChord=0.0275568 ThickChord=0.0275568
    5  0.320918  1.9323      1.84267    0.605726  10.7501  0               0         -0.272303   0               as above
    6  0.160459  1.84267     1.7569     0.288791  23.4328  0               0         -0.315298   0               as above
    7  0.073213  1.7569      1.67977    0.125804  44.0875  0               0         -0.340379   0               as above

Wing "elevon_Mid", child of "Wing"
  location (X Y Z) 45.75 6.59102 0.626221, rotation 0 -1.53926 0
  symmetric about XZ
  bounding box size 2.21434 18.0076 0.291599
  totals: TotalSpan=4.83864 TotalProjectedSpan=4.82553 TotalChord=2.06858 TotalArea=9.57959 TotalAR=2.43077 MAC=1.9886
  root: chord 2.20784, twist 0, airfoil file "airfoils/foil_1_11"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 BaseThickChord=0.0300527 ThickChord=0.0300527
  sections:
    n  Span      Root_Chord  Tip_Chord  Area      Sweep    Sweep_Location  Dihedral  Twist      Twist_Location  tip airfoil
    1  0.161     2.20784     2.18238    0.353412  2.17418  0               -4        -0.271205  0               airfoil file "airfoils/foil_1_5"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 BaseThickChord=0.0264878 ThickChord=0.0264878
    2  0.322617  2.18238     2.12199    0.694332  4.58993  0               -4        -0.858817  0               as above
    3  0.645234  2.12199     1.98712    1.32567   5.31466  0               -4        -2.04911   0               as above
    4  1.29047   1.98712     1.75785    2.41638   3.62363  0               -4.4      -2.70452   0               airfoil file "airfoils/foil_1_4"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 BaseThickChord=0.0258566 ThickChord=0.0258566

Wing "elevon_out", child of "Wing"
  location (X Y Z) 45.425 9.061 0.495918, rotation 0 -2.34508 0
  symmetric about XZ
  bounding box size 2.27192 25.5824 0.761839
  totals: TotalSpan=7.57158 TotalProjectedSpan=7.46039 TotalChord=2.06012 TotalArea=14.1632 TotalAR=3.92973 MAC=1.91041
  root: chord 2.23612, twist 0, airfoil file "airfoils/foil_1_11"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 BaseThickChord=0.0300527 ThickChord=0.0300527
  sections:
    n  Span     Root_Chord  Tip_Chord  Area      Sweep     Sweep_Location  Dihedral  Twist      Twist_Location  tip airfoil
    1  0.16125  2.23612     2.22669    0.359814  -3.19082  0               0         0.32154    0               airfoil file "airfoils/foil_1_3"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 BaseThickChord=0.0250906 ThickChord=0.0250906
    2  0.16125  2.22669     2.20447    0.357263  1.35885   0               -5.3      0.497321   0               as above
    3  0.16125  2.20447     2.18656    0.354027  0.392543  0               -6.72857  0.40625    0               as above
    4  0.16125  2.18656     2.16199    0.350601  1.84199   0               -8.94286  0.100446   0               as above
    5  0.34     2.16199     2.10387    0.725196  3.29145   0               -6.625    -0.015067  0               as above
    6  0.3225   2.10387     2.02752    0.666187  5.46563   0               -6.625    0.0728237  0               as above
    7  1.16965  2.02752     1.80934    2.24388   4.25775   0               -9.85714  -0.934152  0               airfoil file "airfoils/foil_1_2"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 BaseThickChord=0.0241614 ThickChord=0.0241614
    8  1.30864  1.80934     1.2849     2.02463   4.01618   0               -12.3214  -0.135603  0               airfoil file "airfoils/foil_1_1"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 BaseThickChord=0.023138 ThickChord=0.023138

Wing "Fin", child of "Wing"
  location (X Y Z) 40 0 2.3, rotation 90 0 0
  bounding box size 16.7406 0.793532 6.1477
  totals: TotalSpan=6.1477 TotalProjectedSpan=6.1477 TotalChord=9.01999 TotalArea=48.9251 TotalAR=0.772491 MAC=9.9937
  root: chord 16.7401, twist 0, airfoil file "airfoilsFin/foil_2_711"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 BaseThickChord=0.0473063 ThickChord=0.0473063
  sections:
    n  Span     Root_Chord  Tip_Chord  Area     Sweep  Sweep_Location  Dihedral  Twist  Twist_Location  tip airfoil
    1  0.59856  16.7401     14.5472    9.36366  73.87  0               0         0      0.25            airfoil file "airfoilsFin/foil_2_611"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 BaseThickChord=0.0473063 ThickChord=0.0473063
    2  0.83544  14.5472     11.4       10.8387  74.55  0               0         0      0.25            airfoil file "airfoilsFin/foil_2_511"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 BaseThickChord=0.0473063 ThickChord=0.0473063
    3  1.0111   11.4        7.9545     9.78467  72.5   0               0         0      0.25            airfoil file "airfoilsFin/foil_2_411"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 BaseThickChord=0.0473063 ThickChord=0.0473063
    4  1.0109   7.9545      6.1601     7.13422  58     0               0         0      0.25            airfoil file "airfoilsFin/foil_2_311"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 BaseThickChord=0.0473063 ThickChord=0.0473063
    5  1.3477   6.1601      4.3881     7.1079   49     0               0         0      0.25            airfoil file "airfoilsFin/foil_2_211"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 BaseThickChord=0.0473063 ThickChord=0.0473063
    6  1.344    4.3881      2.6        4.696    48     0               0         0      0.25            airfoil file "airfoilsFin/foil_2_111"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 BaseThickChord=0.0473063 ThickChord=0.0473063
