OpenVSP model (file version 5), 9 components.
Geometry view with OpenVSP parameter names; values to 6 digits, angles in degrees, lengths in the model's unit.
Overall bounding box: X_Min=0 X_Len=14.42 Y_Min=-7.05558 Y_Len=14.1112 Z_Min=-0.399042 Z_Len=3.65421

Fuselage "Fuselage"
  location (X Y Z) 0 0 0, rotation 0 0 0
  bounding box size 12.6 2.02589 1.97614
  Design: Length=14.408
  cross sections:
    n  XLocPercent  YLocPercent  ZLocPercent  shape
    0  0            0            0            point
    1  0.138812     0            0.0246391    ellipse Ellipse_Height=1.35 Ellipse_Width=1.4
    2  0.416435     0            0.0402554    circle Circle_Diameter=1.95
    3  0.624653     0            0.0381732    circle Circle_Diameter=1.55
    4  0.874514     0            0.0485841    point

Wing "Canard", child of "Fuselage"
  location (X Y Z) 0.5 0 0.05, rotation 0 0 0
  symmetric about XZ
  bounding box size 0.810749 3.43631 0.228284
  totals: TotalSpan=3.3642 TotalProjectedSpan=3.356 TotalChord=0.7 TotalArea=2.35494 TotalAR=4.78261 MAC=0.704762
  root: chord 0.8, twist 0, edit curve Width=0.8 Height=0.096 AbsoluteFlag=0 SymType=0 cubic Bezier points (X Y): 0.5 -3.75178e-05, 0.416354 0.0194309, 0.332651 0.0603192, 0.249062 0.0280658, 0.165472 -0.00418762, 0.0820709 -0.0649459, -0.0015124 -0.0982205, -0.0850957 -0.131495, -0.168797 -0.139771, -0.252475 -0.14052, -0.294314 -0.140895, -0.336156 -0.138635, -0.377984 -0.130511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
  sections:
    n  Span    Root_Chord  Tip_Chord  Area     Sweep  Sweep_Location  Dihedral  Twist  Twist_Location  tip airfoil
    1  1.6821  0.8         0.6        1.17747  2      0               -4        0      0.25            edit curve Width=0.6 Height=0.072 AbsoluteFlag=0 SymType=0 cubic Bezier points (X Y): 0.5 -3.75178e-05, 0.416354 0.0194309, 0.332651 0.0603192, 0.249062 0.0280658, 0.165472 -0.00418762, 0.0820709 -0.0649459, -0.0015124 -0.0982205, -0.0850957 -0.131495, -0.168797 -0.139771, -0.252475 -0.14052, -0.294314 -0.140895, -0.336156 -0.138635, -0.377984 -0.130511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

Wing "VTP", child of "Fuselage"
  location (X Y Z) 9.85 0 0.7, rotation 90 0 0
  bounding box size 3.74816 0.315683 2.25
  totals: TotalSpan=2.25 TotalProjectedSpan=2.25 TotalChord=2.1 TotalArea=4.725 TotalAR=1.07143 MAC=2.13214
  root: chord 2.55, twist 0, edit curve Width=2.55 Height=0.306 AbsoluteFlag=0 SymType=0 cubic Bezier points (X Y): 0.5 0, 0.416225 -0.097755, 0.332518 -0.199757, 0.248625 -0.290256, 0.164733 -0.380754, 0.0805475 -0.457879, -0.00397364 -0.48685, -0.0884948 -0.515822, -0.173213 -0.497521, -0.257558 -0.443685, -0.299731 -0.416767, -0.341835 -0.380287, -0.383629 -0.326111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
  sections:
    n  Span  Root_Chord  Tip_Chord  Area   Sweep  Sweep_Location  Dihedral  Twist  Twist_Location  tip airfoil
    1  2.25  2.55        1.65       4.725  43     0               0         0      0.25            edit curve Width=1.65 Height=0.198 AbsoluteFlag=0 SymType=0 cubic Bezier points (X Y): 0.5 0, 0.33245 -0.19551, 0.165069 -0.428907, -0.00397364 -0.48685, -0.0884948 -0.515822, -0.173213 -0.497521, -0.257558 -0.443685, -0.299731 -0.416767, -0.341835 -0.380287, -0.383629 -0.326111, -0.425423 -0.271935, -0.5 -0.349928, -0.5 0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

Wing "VTP-fairing", child of "VTP"
  location (X Y Z) 11.82 0 2.885, rotation 90 0 0
  bounding box size 2.6 0.240336 0.490336
  totals: TotalSpan=0.25 TotalProjectedSpan=0.25 TotalChord=2.6 TotalArea=0.65 TotalAR=0.0961538 MAC=2.6
  root: chord 2.6, twist 0, edit curve Width=2.6 Height=0.234 AbsoluteFlag=0 SymType=0 cubic Bezier points (X Y): 0.5 0, 0.4162 -0.0859455, 0.3324 -0.172013, 0.24859 -0.256841, 0.164781 -0.341669, 0.0808934 -0.4198, -0.00317149 -0.463486, -0.0872364 -0.507173, -0.171484 -0.513539, -0.255543 -0.468538, -0.297573 -0.446037, -0.33957 -0.412573, -0.381366 -0.358586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
  sections:
    n  Span  Root_Chord  Tip_Chord  Area  Sweep  Sweep_Location  Dihedral  Twist  Twist_Location  tip airfoil
    1  0.25  2.6         2.6        0.65  0      0               0         0      0.25            as above

Wing "HTP", child of "VTP-fairing"
  location (X Y Z) 12.2 0 3.02, rotation 0 0 0
  symmetric about XZ
  bounding box size 2.08066 4.33191 0.269781
  totals: TotalSpan=4.259 TotalProjectedSpan=4.24863 TotalChord=0.975 TotalArea=4.15252 TotalAR=4.34695 MAC=0.992308
  root: chord 1.2, twist 0, edit curve Width=1.2 Height=0.144 AbsoluteFlag=0 SymType=0 cubic Bezier points (X Y): 0.5 0, 0.415949 -0.0850497, 0.331901 -0.170351, 0.247835 -0.254378, 0.163769 -0.338405, 0.0795977 -0.418028, -0.00490261 -0.462507, -0.0894029 -0.506985, -0.17424 -0.513982, -0.258725 -0.467533, -0.300967 -0.444308, -0.343147 -0.409762, -0.384952 -0.354114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
  sections:
    n  Span    Root_Chord  Tip_Chord  Area     Sweep  Sweep_Location  Dihedral  Twist  Twist_Location  tip airfoil
    1  2.1295  1.2         0.75       2.07626  32     0               -4        0      0.25            edit curve Width=0.75 Height=0.09 AbsoluteFlag=0 SymType=0 cubic Bezier points (X Y): 0.5 0, 0.331898 -0.170099, 0.164098 -0.37355, -0.00490261 -0.462507, -0.0894029 -0.506985, -0.17424 -0.513982, -0.258725 -0.467533, -0.300967 -0.444308, -0.343147 -0.409762, -0.384952 -0.354114, -0.426757 -0.298467, -0.5 -0.35063, -0.5 0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

Wing "Fence", child of "Fuselage"
  location (X Y Z) 8.33 0 0.7, rotation 0 0 0
  symmetric about XZ
  bounding box size 4 1.26121 0.506806
  totals: TotalSpan=1.4 TotalProjectedSpan=1.17679 TotalChord=4 TotalArea=5.6 TotalAR=0.247293 MAC=4
  root: chord 4, twist 0, NACA 4-series Camber=0 CamberLoc=0.2 ThickChord=0.05
  sections:
    n  Span  Root_Chord  Tip_Chord  Area  Sweep  Sweep_Location  Dihedral  Twist  Twist_Location  tip airfoil
    1  0.7   4           4          2.8   0      0               -32.8     0      0.25            NACA 4-series Camber=0 CamberLoc=0.2 ThickChord=0.02

Fuselage "Nacelle", child of "Fuselage"
  location (X Y Z) 6.2 2.064 1, rotation 1.5 0 0
  symmetric about XZ
  bounding box size 3.75328 5.24898 0.684513
  Design: Length=4
  cross sections:
    n  XLocPercent  YLocPercent  ZLocPercent  shape
    0  0.0125       0            -0.0175      point
    1  0.0625       0            -0.0125      super ellipse Super_Height=0.35 Super_M=3 Super_MaxWidthLoc=0 Super_N=2 Super_Width=0.6
    2  0.3          0            0            rounded rectangle RoundRectXSec_Radius=0.2 RoundedRect_Height=0.6 RoundedRect_Width=0.8
    3  0.45         0            0            rounded rectangle RoundRectXSec_Radius=0.2 RoundedRect_Height=0.63 RoundedRect_Width=0.805
    4  0.85         0            0            rounded rectangle RoundRectXSec_Radius=0.2 RoundedRect_Height=0.3 RoundedRect_Width=1.05
    5  0.95082      0            0            point

Fuselage "Spinner", child of "Nacelle"
  location (X Y Z) 6.5 2.064 1, rotation 1.5 0 0
  symmetric about XZ
  bounding box size 4.3 4.87604 0.748041
  Design: Length=4.3
  cross sections:
    n  XLocPercent  YLocPercent  ZLocPercent  shape
    0  0            0            0            point
    1  0.25         0            0            circle Circle_Diameter=0.6
    2  0.813953     0            0            circle Circle_Diameter=0.5
    3  1            0            0            point

Wing "Wing", child of "Fuselage"
  location (X Y Z) 7.38 0 0.8, rotation 0 0 0
  symmetric about XZ
  bounding box size 1.80578 14.1112 0.33978
  totals: TotalSpan=14.03 TotalProjectedSpan=14.0252 TotalChord=1.36667 TotalArea=16.9295 TotalAR=11.6191 MAC=1.29721
  root: chord 1.8, twist 2.5, edit curve Width=1.8 Height=0.234 AbsoluteFlag=0 SymType=0 cubic Bezier points (X Y): 0.5 -1.49883e-05, 0.415855 -0.0379762, 0.331607 -0.066476, 0.247688 -0.127213, 0.163768 -0.187951, 0.0799956 -0.26162, -0.00407742 -0.308128, -0.0881504 -0.354636, -0.172529 -0.373094, -0.256758 -0.348372, -0.298872 -0.336012, -0.340964 -0.315042, -0.382824 -0.27738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
  sections:
    n  Span   Root_Chord  Tip_Chord  Area     Sweep  Sweep_Location  Dihedral  Twist  Twist_Location  tip airfoil
    1  1.77   1.8         1.55       2.96475  1.2    0               1.5       2.5    0.25            edit curve Width=1.55 Height=0.2015 AbsoluteFlag=0 SymType=0 cubic Bezier points (X Y): 0.5 -1.49883e-05, 0.415855 -0.0379762, 0.331607 -0.066476, 0.247688 -0.127213, 0.163768 -0.187951, 0.0799956 -0.26162, -0.00407742 -0.308128, -0.0881504 -0.354636, -0.172529 -0.373094, -0.256758 -0.348372, -0.298872 -0.336012, -0.340964 -0.315042, -0.382824 -0.27738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
    2  0.6    1.55        1.3        0.855    1.2    0               1.5       0      0.25            edit curve Width=1.3 Height=0.182 AbsoluteFlag=0 SymType=0 cubic Bezier points (X Y): 0.5 -1.6269e-05, 0.415752 -0.0409074, 0.331391 -0.0730678, 0.247399 -0.135287, 0.163408 -0.197507, 0.0795795 -0.272099, -0.00460951 -0.318774, -0.0887985 -0.365449, -0.173354 -0.383428, -0.257713 -0.356738, -0.299893 -0.343393, -0.342043 -0.321132, -0.383899 -0.28155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
    3  4.645  1.3         0.7        4.645    1.2    0               1.5       -2     0.25            edit curve Width=0.7 Height=0.084 AbsoluteFlag=0 SymType=0 cubic Bezier points (X Y): 0.5 -1.37066e-05, 0.415954 -0.0345168, 0.331817 -0.0586619, 0.247968 -0.117688, 0.164119 -0.176714, 0.0804001 -0.249271, -0.00356326 -0.29567, -0.0875267 -0.342069, -0.171742 -0.361054, -0.255846 -0.338518, -0.297898 -0.32725, -0.339934 -0.307714, -0.381791 -0.272137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

VSPAERO settings: Sref=16.9295 bref=14.03 cref=1.36667 Xcg=0 Ycg=0 Zcg=0 AlphaStart=2 AlphaEnd=10 AlphaNpts=1 BetaStart=0 BetaEnd=0 BetaNpts=1 MachStart=0 MachEnd=0 MachNpts=1 ReCref=1e+07 Vinf=100 Rho=0.002377
