OpenVSP model (file version 5), 5 components.
Geometry view with OpenVSP parameter names; values to 6 digits, angles in degrees, lengths in the model's unit.
Overall bounding box: X_Min=-0.409836 X_Len=1.47856 Y_Min=-0.8 Y_Len=1.6 Z_Min=-0.04572 Z_Len=0.209164

Wing "Wing_Main"
  location (X Y Z) 0 0 0.04, rotation 0 0 0
  symmetric about XZ
  bounding box size 0.230218 1.6 0.0320165
  totals: TotalSpan=1.6 TotalProjectedSpan=1.6 TotalChord=0.192665 TotalArea=0.29333 TotalAR=8.72737 MAC=0.19682
  root: chord 0.23, twist 0, airfoil file "NACA 6412"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 BaseThickChord=0.120279 ThickChord=0.120279
  sections:
    n  Span  Root_Chord  Tip_Chord  Area      Sweep  Sweep_Location  Dihedral  Twist  Twist_Location  tip airfoil
    1  0.3   0.23        0.23       0.069     0      0.25            0         0      0.25            as above
    2  0.5   0.23        0.08066    0.077665  4      0.25            0         0      0.25            as above

Fuselage "Fuselage_main"
  location (X Y Z) -0.409836 0 0, rotation 0 0 0
  bounding box size 0.9144 0.0824229 0.09144
  Design: Length=0.9144
  cross sections:
    n  XLocPercent  YLocPercent  ZLocPercent  shape
    0  0            0            0            point
    1  0.25         0            0            rounded rectangle RoundRectXSec_Radius=0.006096 RoundedRect_Height=0.09144 RoundedRect_Width=0.0762
    2  0.5          0            0            as above
    3  0.75         0            0            as above
    4  1            0            0            point

Wing "Wing_elevator", child of "Fuselage_main"
  location (X Y Z) 0.8144 0 0.04, rotation 0 0 0
  symmetric about XZ
  bounding box size 0.165811 0.6858 0.0199058
  totals: TotalSpan=0.6858 TotalProjectedSpan=0.6858 TotalChord=0.165811 TotalArea=0.113713 TotalAR=4.13604 MAC=0.165811
  root: chord 0.165811, twist 0, airfoil file "NACA 0012 AIRFOILS"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 BaseThickChord=0.120035 ThickChord=0.120035
  sections:
    n  Span    Root_Chord  Tip_Chord  Area       Sweep  Sweep_Location  Dihedral  Twist  Twist_Location  tip airfoil
    1  0.3429  0.165811    0.16581    0.0568565  0      0               0         0      0.25            NACA 4-series Camber=0 CamberLoc=0.2 ThickChord=0.1

Wing "Winglet_elevator"
  location (X Y Z) 0.813 0.34 0.04, rotation 90 0 0
  symmetric about XZ
  bounding box size 0.255727 0.700466 0.123444
  totals: TotalSpan=0.246888 TotalProjectedSpan=0.246888 TotalChord=0.210769 TotalArea=0.0520362 TotalAR=1.17137 MAC=0.213965
  root: chord 0.255727, twist 0, airfoil file "NACA 0008"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 BaseThickChord=0.0800223 ThickChord=0.0800223
  sections:
    n  Span      Root_Chord  Tip_Chord  Area       Sweep  Sweep_Location  Dihedral  Twist  Twist_Location  tip airfoil
    1  0.123444  0.255727    0.16581    0.0260181  30     0               0         0      0.25            NACA 4-series Camber=0 CamberLoc=0.2 ThickChord=0.1

Fuselage "Fuselage_conneciton"
  location (X Y Z) 0 0.34 0.04, rotation 0 0 0
  symmetric about XZ
  bounding box size 0.9144 0.699993 0.0199925
  Design: Length=0.9144
  cross sections:
    n  XLocPercent  YLocPercent  ZLocPercent  shape
    0  0            0            0            rounded rectangle RoundRectXSec_Radius=0.001454 RoundedRect_Height=0.0199925 RoundedRect_Width=0.0199925
    1  0.25         0            0            as above
    2  0.5          0            0            as above
    3  0.75         0            0            as above
    4  1            0            0            as above
