OpenVSP model (file version 5), 2 components.
Geometry view with OpenVSP parameter names; values to 6 digits, angles in degrees, lengths in the model's unit.
Overall bounding box: X_Min=0 X_Len=1.04626 Y_Min=-1.0305 Y_Len=2.061 Z_Min=-0.0394471 Z_Len=0.0788943

Fuselage "FuselageGeom"
  location (X Y Z) 0.25 0 0, rotation 0 0 0
  bounding box size 0.4 0.0353995 0.0353995
  Design: Length=0.4
  cross sections:
    n  XLocPercent  YLocPercent  ZLocPercent  shape
    0  0            0            0            point
    1  0.25         0            0            circle Circle_Diameter=0.01
    2  0.5          0            0            as above
    3  0.75         0            0            as above
    4  1            0            0            point

Wing "WingGeom", child of "FuselageGeom"
  location (X Y Z) 0 0 0, rotation 0 0 0
  symmetric about XZ
  bounding box size 1.04626 2.061 0.0788943
  totals: TotalSpan=2.061 TotalProjectedSpan=2.061 TotalChord=0.628602 TotalArea=1.29555 TotalAR=3.2787 MAC=0.645271
  root: chord 0.8059, twist 0, airfoil file ""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 BaseThickChord=0.0978598 ThickChord=0.0978598
  sections:
    n  Span    Root_Chord  Tip_Chord  Area      Sweep  Sweep_Location  Dihedral  Twist  Twist_Location  tip airfoil
    1  1.0305  0.8059      0.451304   0.647774  30     0               0         0      0.25            as above
