OpenVSP model (file version 5), 5 components.
Geometry view with OpenVSP parameter names; values to 6 digits, angles in degrees, lengths in the model's unit.
Overall bounding box: X_Min=-4.55893 X_Len=34.3479 Y_Min=-9.87861 Y_Len=19.7572 Z_Min=-0.921069 Z_Len=4.43851

Fuselage "FuselageGeom"
  location (X Y Z) 0.0825 0 0, rotation 0 0 0
  bounding box size 28.9081 1.89 1.90078
  Design: Length=28.9081
  cross sections:
    n  XLocPercent  YLocPercent  ZLocPercent  shape
    0  0            0            -0.02756     point
    1  0.00601446   0            -0.0270558   edit curve Width=0.21 Height=0.21 AbsoluteFlag=0 SymType=0 cubic Bezier points (X Y): 0.5 0, 0.5 -0.276667, 0.276667 -0.5, 0 -0.5, -0.276667 -0.5, -0.5 -0.276667, -0.5 0, -0.5 0.276667, -0.276667 0.5, 0 0.5, 0.276667 0.5, 0.5 0.276667, 0.5 0
    2  0.429396     0            0            ellipse Ellipse_Height=1.62259 Ellipse_Width=1.89
    3  0.532268     0            0            ellipse Ellipse_Height=1.62259 Ellipse_Width=1.65
    4  0.672068     0            0            ellipse Ellipse_Height=1.62259 Ellipse_Width=1.89
    5  1            0            0.0220129    edit curve Width=0.225 Height=0.225 AbsoluteFlag=0 SymType=0 cubic Bezier points (X Y): 0.5 0, 0.5 -0.276667, 0.276667 -0.5, 0 -0.5, -0.276667 -0.5, -0.5 -0.276667, -0.5 0, -0.5 0.276667, -0.276667 0.5, 0 0.5, 0.276667 0.5, 0.5 0.276667, 0.5 0
    6  1            0            0.0220129    point

Wing "WingGeom", child of "FuselageGeom"
  location (X Y Z) 4.37364 0 -0.228261, rotation 0 0 0
  symmetric about XZ
  bounding box size 21.812 19.7572 0.628907
  totals: TotalSpan=19.7348 TotalProjectedSpan=19.7348 TotalChord=13.7983 TotalArea=193.498 TotalAR=2.01275 MAC=12.339
  root: chord 20.6989, twist 0, NACA 4-series Camber=0 CamberLoc=0.2 ThickChord=0.03
  sections:
    n  Span      Root_Chord  Tip_Chord  Area     Sweep    Sweep_Location  Dihedral  Twist      Twist_Location  tip airfoil
    1  0.402013  20.6989     19.736     8.12767  75       0               0         0          0.25            as above
    2  0.388416  19.736      18.2769    7.3824   75       0               0         0          0.25            NACA 4-series Camber=0 CamberLoc=0.2 ThickChord=0.02
    3  1.03061   18.2769     15.4688    17.3893  69.7273  0               0         0          0.25            NACA 4-series Camber=0 CamberLoc=0.704545 ThickChord=0.02
    4  2.12283   15.4688     9.75373    26.7717  69.7273  0               0         0          0.25            NACA 4-series Camber=0 CamberLoc=0.2 ThickChord=0.03
    5  1.61074   9.75373     7.75494    14.101   52.3636  0               0         0          0.25            as above
    6  4.31279   7.75494     2.9004     22.9771  51       0               0         0.0909091  0.25            edit curve Width=2.9004 Height=0.029004 AbsoluteFlag=0 SymType=0 cubic Bezier points (X Y): 0.5 0, 0.166711 -0.666581, -0.166711 -0.666581, -0.5 0, -0.166711 0.666581, 0.166711 0.666581, 0.5 0

Wing "Tail", child of "WingGeom"
  location (X Y Z) 22.1438 0 0.54, rotation 90 0 0
  bounding box size 6.43272 0.236035 0.384
  totals: TotalSpan=0.384 TotalProjectedSpan=0.384 TotalChord=5.81275 TotalArea=2.23209 TotalAR=0.0660617 MAC=5.83479
  root: chord 6.43272, twist 0, NACA 4-series Camber=0 CamberLoc=0.2 ThickChord=0.00916193
  sections:
    n  Span   Root_Chord  Tip_Chord  Area     Sweep  Sweep_Location  Dihedral  Twist  Twist_Location  tip airfoil
    1  0.384  6.43272     5.19278    2.23209  67     0               0         0      0.25            edit curve Width=5.19278 Height=0.236035 AbsoluteFlag=0 SymType=0 cubic Bezier points (X Y): 0.5 0, 0.333785 -0.332455, 0.166894 -0.5, 0 -0.5, -0.166894 -0.5, -0.333785 -0.332455, -0.5 0, -0.333785 0.332455, -0.166894 0.5, 0 0.5, 0.166894 0.5, 0.333785 0.332455, 0.5 0

Wing "All_Moving_Tail", child of "Tail"
  location (X Y Z) 23.0505 0 0.9255, rotation 90 0 0
  bounding box size 6.73843 0.235937 2.59194
  totals: TotalSpan=2.59194 TotalProjectedSpan=2.59194 TotalChord=3.11479 TotalArea=8.07336 TotalAR=0.83214 MAC=3.57593
  root: chord 5.19062, twist 0, edit curve Width=5.19062 Height=0.235937 AbsoluteFlag=0 SymType=0 cubic Bezier points (X Y): 0.5 0, 0.333785 -0.332455, 0.166894 -0.5, 0 -0.5, -0.166894 -0.5, -0.333785 -0.332455, -0.5 0, -0.333785 0.332455, -0.166894 0.5, 0 0.5, 0.166894 0.5, 0.333785 0.332455, 0.5 0
  sections:
    n  Span     Root_Chord  Tip_Chord  Area     Sweep    Sweep_Location  Dihedral  Twist  Twist_Location  tip airfoil
    1  2.59194  5.19062     1.03896    8.07336  65.5455  0               0         0      0.25            edit curve Width=1.03896 Height=0.103896 AbsoluteFlag=0 SymType=0 cubic Bezier points (X Y): 0.5 0, 0.335468 -0.329178, 0.16776 -0.5, 0 -0.5, -0.16776 -0.5, -0.335468 -0.329178, -0.5 0, -0.335468 0.329178, -0.16776 0.5, 0 0.5, 0.16776 0.5, 0.335468 0.329178, 0.5 0

Pod "Quiet_Spike"
  location (X Y Z) 1.92857 0 -0.785714, rotation -180 0 -180
  bounding box size 6.4875 0.0721193 0.0721193
  Design: FineRatio=179.91 Length=6.4875

VSPAERO settings: Sref=36.735 bref=9.3 cref=3.95 Xcg=44.249 Ycg=0 Zcg=0 AlphaStart=0 AlphaEnd=10 AlphaNpts=6 BetaStart=0 BetaEnd=0 BetaNpts=1 MachStart=0.8 MachEnd=0 MachNpts=1 ReCref=1e+07 Vinf=100 Rho=0.002377
  control group "canard_SS_CONT_0": DeflectionAngle=0
