OpenVSP model (file version 5), 7 components.
Geometry view with OpenVSP parameter names; values to 6 digits, angles in degrees, lengths in the model's unit.
Overall bounding box: X_Min=0 X_Len=16.9925 Y_Min=-5.04688 Y_Len=10.0938 Z_Min=-0.583333 Z_Len=4.57005

Fuselage "Mainbody"
  location (X Y Z) 0 0 0, rotation 0 0 0
  bounding box size 16.5 1.95 1.55096
  Design: Length=16.5
  cross sections:
    n  XLocPercent  YLocPercent  ZLocPercent  shape
    0  0            0            0.03         point
    1  0.303414     0            0.04         ellipse Ellipse_Height=1.38201 Ellipse_Width=1.21036
    2  0.401707     0            0.04         ellipse Ellipse_Height=1.38201 Ellipse_Width=1.37582
    3  0.616505     0            0.0326087    ellipse Ellipse_Height=1.18182 Ellipse_Width=1.95
    4  0.931753     0            0.0326087    ellipse Ellipse_Height=1.25 Ellipse_Width=1.25
    5  0.968674     0            0.0326087    circle Circle_Diameter=0.912229
    6  1            0            0.03237      circle Circle_Diameter=0.410305

Wing "Main_wing", child of "Mainbody"
  location (X Y Z) 6.30435 0 0.29, rotation 0 0 0
  symmetric about XZ
  bounding box size 5.61458 10.0938 0.120382
  totals: TotalSpan=10.0938 TotalProjectedSpan=10.0938 TotalChord=3.40885 TotalArea=34.4081 TotalAR=2.96104 MAC=3.8846
  root: chord 5.61458, twist 0, NACA 4-series Camber=0 CamberLoc=0.2 ThickChord=0.02
  sections:
    n  Span     Root_Chord  Tip_Chord  Area     Sweep    Sweep_Location  Dihedral  Twist  Twist_Location  tip airfoil
    1  5.04688  5.61458     1.20312    17.2041  41.0455  0               0         0      0.25            NACA 4-series Camber=0 CamberLoc=0.2 ThickChord=0.1

Fuselage "External_Tank", child of "Main_wing"
  location (X Y Z) 6.52174 1.41304 -0.233333, rotation 0 0 0
  symmetric about XZ
  bounding box size 4.12679 3.52609 0.7
  Design: Length=4.12679
  cross sections:
    n  XLocPercent  YLocPercent  ZLocPercent  shape
    0  0            0            0            point
    1  0.25         0            0            ellipse Ellipse_Height=0.7 Ellipse_Width=0.7
    2  0.5          0            0            as above
    3  0.75         0            0            as above
    4  1            0            0            point

Wing "Tail_Elevon", child of "External_Tank"
  location (X Y Z) 12.2004 0 0.29, rotation 0 0 0
  symmetric about XZ
  bounding box size 3.97969 6.06754 0.129757
  totals: TotalSpan=6.06754 TotalProjectedSpan=6.06754 TotalChord=2.43169 TotalArea=14.7544 TotalAR=2.49519 MAC=2.60824
  root: chord 3.56657, twist 0, NACA 4-series Camber=0 CamberLoc=0.2 ThickChord=0.02
  sections:
    n  Span     Root_Chord  Tip_Chord  Area    Sweep    Sweep_Location  Dihedral  Twist  Twist_Location  tip airfoil
    1  3.03377  3.56657     1.29682    7.3772  41.4875  0               0         0      0.25            NACA 4-series Camber=0 CamberLoc=0.2 ThickChord=0.1

Wing "Vertical_Stablizer", child of "Tail_Elevon"
  location (X Y Z) 9.78261 0 0.85, rotation 90 0 0
  bounding box size 7.20987 0.145928 3.13672
  totals: TotalSpan=3.13672 TotalProjectedSpan=3.13672 TotalChord=3.19968 TotalArea=8.46748 TotalAR=1.16198 MAC=3.24178
  root: chord 5.83333, twist 0, NACA 4-series Camber=0 CamberLoc=0.2 ThickChord=0.025
  sections:
    n  Span      Root_Chord  Tip_Chord  Area     Sweep    Sweep_Location  Dihedral  Twist  Twist_Location  tip airfoil
    1  0.890626  5.83333     2.88113    3.88066  75.1602  0               0         0      0.25            NACA 4-series Camber=0 CamberLoc=0.2 ThickChord=0.05
    2  2.24609   2.88113     1.20313    4.58681  49.6659  0               0         0      0.25            NACA 4-series Camber=0 CamberLoc=0.2 ThickChord=0.1

Wing "Back-front", child of "Vertical_Stablizer"
  location (X Y Z) 11.9332 0 0.29, rotation 0 0 0
  symmetric about XZ
  bounding box size 1.35529 2.5 0.134999
  totals: TotalSpan=2.5 TotalProjectedSpan=2.5 TotalChord=0.800904 TotalArea=2.00226 TotalAR=3.12147 MAC=0.926027
  root: chord 0.252601, twist 0, NACA 4-series Camber=0 CamberLoc=0.2 ThickChord=0.02
  sections:
    n  Span  Root_Chord  Tip_Chord  Area     Sweep     Sweep_Location  Dihedral  Twist  Twist_Location  tip airfoil
    1  1.25  0.252601    1.34921    1.00113  0.278977  0               0         0      0.25            NACA 4-series Camber=0 CamberLoc=0.2 ThickChord=0.1

Wing "Hardpoints", child of "Back-front"
  location (X Y Z) 8.15217 1.41313 -0.02, rotation 90 0 0
  symmetric about XZ
  bounding box size 1.1714 2.92632 0.296876
  totals: TotalSpan=0.593752 TotalProjectedSpan=0.593752 TotalChord=1.01042 TotalArea=0.599937 TotalAR=0.587631 MAC=1.01045
  root: chord 1.02083, twist 0, NACA 4-series Camber=0 CamberLoc=0.2 ThickChord=0.01
  sections:
    n  Span      Root_Chord  Tip_Chord  Area      Sweep  Sweep_Location  Dihedral  Twist  Twist_Location  tip airfoil
    1  0.296876  1.02083     1          0.299968  30     0               0         0      0.25            NACA 4-series Camber=0 CamberLoc=0.2 ThickChord=0.1
