OpenVSP model (file version 5), 3 components.
Geometry view with OpenVSP parameter names; values to 6 digits, angles in degrees, lengths in the model's unit.
Overall bounding box: X_Min=0 X_Len=25 Y_Min=-9 Y_Len=18 Z_Min=-1.5 Z_Len=3

Fuselage "FuselageGeom"
  location (X Y Z) 0 0 0, rotation 0 0 0
  bounding box size 25 2.5 3
  Design: Length=25
  cross sections:
    n  XLocPercent  YLocPercent  ZLocPercent  shape
    0  0            0            0            point
    1  0.25         0            0            ellipse Ellipse_Height=3 Ellipse_Width=2.5
    2  0.5          0            0            as above
    3  0.707992     0            0            as above
    4  0.915984     0            0            ellipse Ellipse_Height=2.5 Ellipse_Width=2
    5  1            0            0            point

Wing "WingGeom", child of "FuselageGeom"
  location (X Y Z) 10 0 0, rotation 0 0 0
  symmetric about XZ
  bounding box size 6.20112 18 0.459193
  totals: TotalSpan=18 TotalProjectedSpan=18 TotalChord=2.5 TotalArea=45 TotalAR=7.2 MAC=2.8
  root: chord 4, twist 0, NACA 5-digit CamberLoc=0.25 IdealCl=0.8 ThickChord=0.0964286
  sections:
    n  Span  Root_Chord  Tip_Chord  Area  Sweep  Sweep_Location  Dihedral  Twist  Twist_Location  tip airfoil
    1  9     4           1          22.5  30     0               0         0      0.25            as above

Pod "PodGeom", child of "WingGeom"
  location (X Y Z) 10 -4.78261 0, rotation 0 0 0; relative location 0 -4.78261 0, rotation 0 0 0
  symmetric about XZ
  bounding box size 5 10.2319 0.666667
  Design: FineRatio=15 Length=5
